// SBML level 2 version 1

model Schmierer_2008_Smad_Tgfb()
  // This sbml file describes the RECI model from:
  // "Mathematical modeling identifies Smad nucleocytoplasmic shuttling as a dynamic signal-interpreting system" by Bernhard Schmierer, Alexander L. Tournier, Paul A. Bates and Caroline S. Hill, Proc Natl Acad Sci U S A. 2008 May 6;105(18):6608-13.
  // All parameter and species names are as in Figure S3 of the original publication. The original model was done in copasi.
  // SB-431542 addition to a concentration of 10000 nM is set at 2700 sec. The initial concentration of SB, the time point of addition and the final concentration can be set by altering the parameters SB_0, t_SB and SB_end.
  // This model file has been used to reproduce Figures 2D and 5A from the research paper using SBMLodesolver. To get the results for the figures, sum the corresponding concentrations:
  // fig 2D: nuclear EGFP-Smad2 = G_n + pG_n + G2_n + G4_n + 2* GG_n
  // fig 5A (either n or c for nucleus or cytosol):
  // monomeric Smad2 = S2_n/c + G_n/c
  // monomeric P-Smad2 = pS2_n/c + pG_n/c
  // Smad2/Smad4 complexes = S24_n/c + G4_n/c
  // Smad2/Smad2 complexes = S22_n/c + G2_n/c + GG_n/c
  // This model originates from BioModels Database: A Database of Annotated Published Models. It is copyright (c) 2005-2009 The BioModels Team.
  // For more information see the terms of use.
  // To cite BioModels Database, please use Le Novère N., Bornstein B., Broicher A., Courtot M., Donizelli M., Dharuri H., Li L., Sauro H., Schilstra M., Shapiro B., Snoep J.L., Hucka M. (2006) BioModels Database: A Free, Centralized Database of Curated, Published, Quantitative Kinetic Models of Biochemical and Cellular Systems Nucleic Acids Res., 34: D689-D691.
  // biomodels.db:MODEL0451870146
  // biomodels.db:BIOMD0000000173
  // isDescribedBy pubmed:18443295
  // isVersionOf kegg.pathway:hsa04350 GO:0007179
  // hasTaxon taxonomy:9606
  // hasProperty mamo:MAMO_0000046

  // Compartments:
  compartment nucleus = 1e-12; nucleus is "Nuc";  // GO:0005634
  compartment cytosol = 2.27e-12; cytosol is "Cyt";  // GO:0005737

  // Species:
  species $PPase in nucleus = 1;  // isVersionOf uniprot:P35813 GO:0004721
  species S2_n in nucleus = 28.51477; S2_n is "Smad2_n";  // isVersionOf uniprot:Q15796
  species pS2_n in nucleus = 0; pS2_n is "pSmad2_n";  // isVersionOf uniprot:Q15796 kegg.compound:C00562
  species G_n in nucleus = 28.51477; G_n is "GFP-Smad2_n";  // isVersionOf uniprot:Q15796; hasVersion interpro:IPR000786
  species pG_n in nucleus = 0; pG_n is "pGFP-Smad2_n";  // isVersionOf uniprot:Q15796 kegg.compound:C00562; hasVersion interpro:IPR000786
  species S22_n in nucleus = 0; S22_n is "pSmad2/pSmad2_n";  // isVersionOf GO:0043234; hasPart uniprot:Q15796; hasVersion kegg.compound:C00562
  species S24_n in nucleus = 0; S24_n is "pSmad2/Smad4_n";  // isVersionOf GO:0043234; hasPart uniprot:Q15796 uniprot:Q13485; hasVersion kegg.compound:C00562
  species S4_n in nucleus = 50.78094; S4_n is "Smad4_n";  // isVersionOf uniprot:Q13485
  species G2_n in nucleus = 0; G2_n is "pGFP-Smad2/pSmad2_n";  // isVersionOf GO:0043234; hasPart uniprot:Q15796; hasVersion interpro:IPR000786 kegg.compound:C00562
  species G4_n in nucleus = 0; G4_n is "pGFP-Smad2/Smad4_n";  // hasVersion uniprot:Q15796 uniprot:Q13485; isVersionOf GO:0043234; hasVersion interpro:IPR000786 kegg.compound:C00562
  species GG_n in nucleus = 0; GG_n is "pGFP-Smad2/pGFP_Smad2_n";  // hasPart uniprot:Q15796; isVersionOf GO:0043234; hasVersion interpro:IPR000786 kegg.compound:C00562
  species S22_c in cytosol = 0; S22_c is "pSmad2/pSmad2_c";  // isVersionOf GO:0043234; hasPart uniprot:Q15796; hasVersion kegg.compound:C00562
  species S24_c in cytosol = 0; S24_c is "pSmad2/Smad4_c";  // isVersionOf GO:0043234; hasPart uniprot:Q15796 uniprot:Q13485; hasVersion kegg.compound:C00562
  species S4_c in cytosol = 50.78103; S4_c is "Smad4_c";  // isVersionOf uniprot:Q13485
  species S2_c in cytosol = 60.58992; S2_c is "Smad2_c";  // isVersionOf uniprot:Q15796
  species pS2_c in cytosol = 0; pS2_c is "pSmad2_c";  // isVersionOf uniprot:Q15796 kegg.compound:C00562
  species G_c in cytosol = 60.58992; G_c is "GFP-Smad2_c";  // isVersionOf uniprot:Q15796; hasVersion interpro:IPR000786
  species pG_c in cytosol = 0; pG_c is "pGFP-Smad2_c";  // isVersionOf uniprot:Q15796 kegg.compound:C00562; hasVersion interpro:IPR000786
  species G2_c in cytosol = 0; G2_c is "pGFP-Smad2/pSmad2_c";  // isVersionOf GO:0043234; hasPart uniprot:Q15796; hasVersion interpro:IPR000786 kegg.compound:C00562
  species G4_c in cytosol = 0; G4_c is "pGFP-Smad2/Smad4_c";  // isVersionOf GO:0043234; hasPart uniprot:Q15796 uniprot:Q13485; hasVersion interpro:IPR000786 kegg.compound:C00562
  species GG_c in cytosol = 0; GG_c is "pGFP-Smad2/pGFP-Smad2_c";  // isVersionOf GO:0043234; hasPart uniprot:Q15796; hasVersion interpro:IPR000786 kegg.compound:C00562
  species $TGFb_c in cytosol = 0.06599998;  // hasVersion uniprot:P01137 uniprot:P61812 uniprot:P10600
  species R_act in cytosol = 0;  // hasVersion uniprot:P36897 uniprot:Q8NER5 uniprot:Q5T7S2 uniprot:P37173
  species R in cytosol = 1;  // hasVersion uniprot:P36897 uniprot:Q5T7S2 uniprot:Q8NER5 uniprot:P37173
  species R_inact in cytosol = 0;  // hasVersion uniprot:P36897 uniprot:Q5T7S2 uniprot:Q8NER5 uniprot:P37173
  species $SB in cytosol; SB is "SB-431542";  // hasVersion GO:0030291

  // Parameters:
  kin = 5.93e-15 lps; kin is "kin (import rate for monomeric Smads)";
  kex = 1.26e-14 lps; kex is "kex (export rate for monomeric Smads)";
  kphos = 0.0004037082 pnMps; kphos is "kphos (phosphorylation rate)";
  kdephos = 0.00656639 pnMps; kdephos is "kdephos (dephosphorylation rate)";
  kin_CIF = 3.36347821e-14 lps; kin_CIF is "kin*CIF (Complex import rate)";
  kon = 0.001839256 pnMps; kon is "kon (Smad complex on-rate)";
  koff = 0.016 ps; koff is "koff (Smad complex off-rate)";
  CIF has dimensionless; CIF is "CIF (complex import factor)";
  K_diss has nM; K_diss is "Kdiss (dissociation constant of Smad complexes)";
  kon_SB = 0.1464223 pnMps; kon_SB is "kon_SB (on-rate of the SB/receptor interaction)";
  koff_SB = 100 ps; koff_SB is "koff_SB (off-rate of the SB/receptor interaction)";
  k_TGFb = 0.07423555 pnMps; k_TGFb is "k_TGFb (rate of TGFb binding to receptors)";
  K_dissSB has nM; K_dissSB is "Kdiss SB (dissociation constant of the SB/receptor interaction)";
  ntoN = 6.0221415e14 dimensionless; ntoN is "quantity to number factor";
  SB_0 = 0 nM; SB_0 is "SB conc at start";
  SB_add = 10000 nM; SB_add is "SB conc after addition";
  t_SB = 2700 time; t_SB is "time of SB addition";

  // Assignment rules:
  CIF := kin_CIF/kin;
  K_diss := koff/kon;
  K_dissSB := koff_SB/kon_SB;
  SB := piecewise(SB_add, time > t_SB, SB_0);

  // Reactions:
  Reaction_7_Shuttling_S4: S4_c -> S4_n; kin*S4_c - kin*S4_n;  // isVersionOf GO:0006913
  Reaction_5A_Shuttling_S2: S2_c -> S2_n; kin*S2_c - kex*S2_n;  // isVersionOf GO:0006913
  Reaction_6A_Shuttling_pS2: pS2_c -> pS2_n; kin*pS2_c - kex*pS2_n;  // isVersionOf GO:0006913
  Reaction_2A_Phosphorylation_S2: R_act + S2_c => R_act + pS2_c; cytosol*kphos*R_act*S2_c;  // isVersionOf ec-code:2.7.11.30 GO:0004675
  Reaction_3A_Formation_S24_C: pS2_c + S4_c -> S24_c; cytosol*(kon*pS2_c*S4_c - koff*S24_c);  // isVersionOf GO:0006461
  Reaction_3B_Formation_S24_N: pS2_n + S4_n -> S24_n; nucleus*(kon*pS2_n*S4_n - koff*S24_n);  // isVersionOf GO:0006461
  Reaction_8A_Import_S24: S24_c => S24_n; kin_CIF*S24_c;  // isVersionOf GO:0006913
  Reaction_9A_Import_S22: S22_c => S22_n; kin_CIF*S22_c;  // isVersionOf GO:0006913
  Reaction_4A_Formation_S22_C: 2 pS2_c -> S22_c; cytosol*(kon*pS2_c*pS2_c - koff*S22_c);  // isVersionOf GO:0006461
  Reaction_4B_Formation_S22_N: 2 pS2_n -> S22_n; nucleus*(kon*pS2_n*pS2_n - koff*S22_n);  // isVersionOf GO:0006461
  Reaction_10A_Dephos_pS2_Nuc: pS2_n + $PPase => S2_n + $PPase; nucleus*kdephos*pS2_n*PPase;  // isVersionOf ec-code:3.1.3.16 GO:0004722
  Reaction_1_TGFb_Binding: R + $TGFb_c => R_act; cytosol*k_TGFb*R*TGFb_c;  // isVersionOf GO:0005160
  Reaction_11_Receptor_Inhibition: R_act + $SB -> R_inact; cytosol*(kon_SB*R_act*SB - koff_SB*R_inact);  // isVersionOf GO:0030512
  Reaction_2B_Phosphorylation_GS2: G_c + R_act => pG_c + R_act; cytosol*kphos*G_c*R_act;  // isVersionOf ec-code:2.7.11.30 GO:0004675
  Reaction_10B_Dephos_pG_Nuc: pG_n + $PPase => G_n + $PPase; nucleus*kdephos*pG_n*PPase;  // isVersionOf ec-code:3.1.3.16 GO:0004722
  Reaction_5B_Shuttling_G: G_c -> G_n; kin*G_c - kex*G_n;  // isVersionOf GO:0006913
  Reaction_6B_Shuttling_pG: pG_c -> pG_n; kin*pG_c - kex*pG_n;  // isVersionOf GO:0006913
  Reaction_4E_Formation_GG_C: 2 pG_c -> GG_c; cytosol*(kon*pG_c*pG_c - koff*GG_c);  // isVersionOf GO:0006461
  Reaction_4F_Formation_GG_N: 2 pG_n -> GG_n; nucleus*(kon*pG_n*pG_n - koff*GG_n);  // isVersionOf GO:0006461
  Reaction_4C_Formation_G2_C: pS2_c + pG_c -> G2_c; cytosol*(kon*pS2_c*pG_c - koff*G2_c);  // isVersionOf GO:0006461
  Reaction_4D_Formation_G2_N: pS2_n + pG_n -> G2_n; nucleus*(kon*pS2_n*pG_n - koff*G2_n);  // isVersionOf GO:0006461
  Reaction_3C_Formation_G4_C: pG_c + S4_c -> G4_c; cytosol*(kon*pG_c*S4_c - koff*G4_c);  // isVersionOf GO:0006461
  Reaction_3D_Formation_G4_N: pG_n + S4_n -> G4_n; nucleus*(kon*pG_n*S4_n - koff*G4_n);  // isVersionOf GO:0006461
  Reaction_9C_Import_GG: GG_c => GG_n; kin_CIF*GG_c;  // isVersionOf GO:0006913
  Reaction_9B_Import_G2: G2_c => G2_n; kin_CIF*G2_c;  // isVersionOf GO:0006913
  Reaction_8B_Import_G4: G4_c => G4_n; kin_CIF*G4_c;  // isVersionOf GO:0006913

  // Unit definitions:
  unit substance = 1e-9 mole;
  unit nM = 1e-9 mole / litre;
  unit ps = 1 / second; ps is "persecond";
  unit pnMps = litre / (1e-9 mole * second); pnMps is "pernMpersecond";
  unit lps = litre / second; lps is "litrepersecond";
end
